AB := [1, 5; 1, 5; 1, 1; 1, 1]
M := [3; 3; 1; 1]
dz := 1
dx := 3
dy := 3
T(DX, DY, DZ) := [1, 0, 0, -DX; 0, 1, 0, -DY; 0, 0, 1, -DZ; 0, 0, 0, 1]
AB1 := T(dx, dy, dz)*AB = [-2, 2; -2, 2; 0, 0; 1, 1]
a_rad := 45*π/180 = 0.785398
A(ug) := [cos(ug), -sin(ug), 0, 0; sin(ug), cos(ug), 0, 0; 0, 0, 1, 0; 0, 0, 0, 1]
AB2 := A(a_rad)*AB1 = [0, 0; -2.82843, 2.82843; 0, 0; 1, 1]
AB3 := T(2, 0, 0)*AB2 = [-2, -2; -2.82843, 2.82843; 0, 0; 1, 1]
AB4 := T(-dx, -dy, -dz)*AB3 = [1, 1; 0.171573, 5.82843; 1, 1; 1, 1]
y := [AB4[1, 0]; AB4[1, 1]]
x := [AB4[0, 0]; AB4[0, 1]]
z := [AB4[2, 0]; AB4[2, 1]]
y1 := [AB[1, 0]; AB[1, 1]]
x1 := [AB[0, 0]; AB[0, 1]]
z1 := [AB[2, 0]; AB[2, 1]]
# [component: inputs (x, y, z)]
# [component: inputs (x1, y1, z1)]
