AB := [6, 8; 8, 6; 1, 1]
M := [(AB[0, 0] + AB[0, 1])/2; (AB[1, 0] + AB[1, 1])/2; 1] = [7; 7; 1]
a := 45
a_rad := 45*π/180 = 0.785398
dx := M[0, 0] = 7
dy := M[1, 0] = 7
T(DX, DY) := [1, 0, DX; 0, 1, DY; 0, 0, 1]
AB1 := T(-dx, -dy)*AB = [-1, 1; 1, -1; 1, 1]
A(ug) := [cos(ug), -sin(ug), 0; sin(ug), cos(ug), 0; 0, 0, 1]
AB2 := A(a_rad)*AB1 = [-1.41421, 1.41421; 0, 0; 1, 1]
AB3 := T(dx, dy)*AB2 = [5.58579, 8.41421; 7, 7; 1, 1]
b := -60
b_rad := b*π/180 = -1.0472
ABRES := A(b_rad)*AB3 = [8.85507, 10.2693; -1.33743, -3.78692; 1, 1]
x := [ABRES[0, 0]; ABRES[0, 1]] = [8.85507; 10.2693]
y := [ABRES[1, 0]; ABRES[1, 1]] = [-1.33743; -3.78692]
x1 := [AB[0, 0]; AB[0, 1]] = [6; 8]
y1 := [AB[1, 0]; AB[1, 1]] = [8; 6]
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