ABC := [5, 0, 0; 0, 5, 0; 0, 0, 10; 1, 1, 1]
a_rad := 30*π/180 = 0.523599
T(DX, DY, DZ) := [1, 0, 0, -DX; 0, 1, 0, -DY; 0, 0, 1, -DZ; 0, 0, 0, 1]
ABC1 := T(5, 0, 0)*ABC = [0, -5, -5; 0, 5, 0; 0, 0, 10; 1, 1, 1]
b := atan(-5/5) = -0.785398
A(ug) := [cos(ug), -sin(ug), 0, 0; sin(ug), cos(ug), 0, 0; 0, 0, 1, 0; 0, 0, 0, 1]
Ay(ug) := [cos(ug), 0, sin(ug), 0; 0, 1, 0, 0; -sin(ug), 0, cos(ug), 0; 0, 0, 0, 1]
ABC2 := A(b)*ABC1 = [0, 0, -3.53553; 0, 7.07107, 3.53553; 0, 0, 10; 1, 1, 1]
ABC3 := Ay(a_rad)*ABC2 = [0, 0, 1.93814; 0, 7.07107, 3.53553; 0, 0, 10.428; 1, 1, 1]
ABC4 := A(-b)*ABC3 = [0, -5, -1.12953; 0, 5, 3.87047; 0, 0, 10.428; 1, 1, 1]
ABC5 := T(-5, 0, 0)*ABC4 = [5, 0, 3.87047; 0, 5, 3.87047; 0, 0, 10.428; 1, 1, 1]
x := [ABC5[0, 0]; ABC5[0, 1]; ABC5[0, 2]; ABC5[0, 0]]
z := [ABC5[2, 0]; ABC5[2, 1]; ABC5[2, 2]; ABC5[2, 0]]
y := [ABC5[1, 0]; ABC5[1, 1]; ABC5[1, 2]; ABC5[1, 0]]
x1 := [ABC[0, 0]; ABC[0, 1]; ABC[0, 2]; ABC[0, 0]]
y1 := [ABC[1, 0]; ABC[1, 1]; ABC[1, 2]; ABC[1, 0]]
z1 := [ABC[2, 0]; ABC[2, 1]; ABC[2, 2]; ABC[2, 0]]
# [component: inputs (x, y, z)]
# [component: inputs (x1, y1, z1)]
