ABC := [2, 0, 0; 0, -10, 0; 0, 0, 2; 1, 1, 1]
a_rad := 90*π/180 = 1.5708
dx := 2
dy := 0
dz := 0
T(DX, DY, DZ) := [1, 0, 0, -DX; 0, 1, 0, -DY; 0, 0, 1, -DZ; 0, 0, 0, 1]
ABC1 := T(dx, dy, dz)*ABC = [0, -2, -2; 0, -10, 0; 0, 0, 2; 1, 1, 1]
b := atan(-2/2) = -0.785398
A(ug) := [cos(ug), 0, -sin(ug), 0; 0, 1, 0, 0; sin(ug), 0, cos(ug), 0; 0, 0, 0, 1]
ABC2 := A(b)*ABC1 = [0, -1.41421, 0; 0, -10, 0; 0, 1.41421, 2.82843; 1, 1, 1]
Az(ug) := [cos(ug), -sin(ug), 0, 0; sin(ug), cos(ug), 1, 0; 0, 0, 1, 0; 0, 0, 0, 1]
ABC3 := Az(a_rad)*ABC2 = [0, 10, 0; 0, 0, 2.82843; 0, 1.41421, 2.82843; 1, 1, 1]
ABC4 := A(-b)*ABC3 = [0, 6.07107, -2; 0, 0, 2.82843; 0, 8.07107, 2; 1, 1, 1]
ABC5 := T(-dx, -dy, -dz)*ABC4 = [2, 8.07107, 0; 0, 0, 2.82843; 0, 8.07107, 2; 1, 1, 1]
y := [ABC5[1, 0]; ABC5[1, 1]; ABC5[1, 2]; ABC5[1, 0]]
z := [ABC5[2, 0]; ABC5[2, 1]; ABC5[2, 2]; ABC5[2, 0]]
x := [ABC5[0, 0]; ABC5[0, 1]; ABC5[0, 2]; ABC5[0, 0]]
y1 := [ABC[1, 0]; ABC[1, 1]; ABC[1, 2]; ABC[1, 0]]
z1 := [ABC[2, 0]; ABC[2, 1]; ABC[2, 2]; ABC[2, 0]]
x1 := [ABC[0, 0]; ABC[0, 1]; ABC[0, 2]; ABC[0, 0]]
# [component: inputs (x, y, z)]
# [component: inputs (x1, y1, z1)]
