A := [6; 6; 1]
B := [6; 8; 1]
C := [8; 6; 1]
ABC := augment(A, B, C) = [6, 6, 8; 6, 8, 6; 1, 1, 1]
a := -90
a_rad := (a*π)/180 = -1.5708
dx := 2
dy := 3
T(DX, DY) := [1, 0, DX; 0, 1, DY; 0, 0, 1]
POV(ug) := [cos(ug), -sin(ug), 0; sin(ug), cos(ug), 0; 0, 0, 1]
D := T(-6, -6)*ABC = [0, 0, 2; 0, 2, 0; 1, 1, 1]
ABC1 := POV(a_rad)*D = [0, 2, 0; 0, 0, -2; 1, 1, 1]
ABC2 := T(dx, dy)*ABC1 = [2, 4, 2; 3, 3, 1; 1, 1, 1]
ABCRES := T(6, 6)*ABC2 = [8, 10, 8; 9, 9, 7; 1, 1, 1]
x := [ABCRES[0, 0]; ABCRES[0, 1]; ABCRES[0, 2]; ABCRES[0, 0]] = [8; 10; 8; 8]
y := [ABCRES[1, 0]; ABCRES[1, 1]; ABCRES[1, 2]; ABCRES[1, 0]] = [9; 9; 7; 9]
x1 := [ABC[0, 0]; ABC[0, 1]; ABC[0, 2]; ABC[0, 0]] = [6; 6; 8; 6]
y1 := [ABC[1, 0]; ABC[1, 1]; ABC[1, 2]; ABC[1, 0]] = [6; 8; 6; 6]
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