ABC := [3, 0, 0; 0, -3, 0; 0, 0, 3; 1, 1, 1]
a_rad := 90*π/180 = 1.5708
A(ug) := [cos(ug), -sin(ug), 0, 0; sin(ug), cos(ug), 0, 0; 0, 0, 1, 0; 0, 0, 0, 1]
ABC1 := A(a_rad)*ABC = [0, 3, 0; 3, 0, 0; 0, 0, 3; 1, 1, 1]
dy := 0
dx := 0
dz := 3
T(DX, DY, DZ) := [1, 0, 0, DX; 0, 1, 0, DY; 0, 0, 1, DZ; 0, 0, 0, 1]
ABC2 := T(dx, dy, dz)*ABC1 = [0, 3, 0; 3, 0, 0; 3, 3, 6; 1, 1, 1]
