ABCD := [-1, -1, 1, 1; -1, 1, 1, -1; 1, 1, 1, 1]
a_rad := 45*π/180 = 0.785398
A(ug) := [cos(ug), sin(ug), 0; -sin(ug), cos(ug), 0; 0, 0, 1]
ABCD1 := A(a_rad)*ABCD = [-1.41421, 0, 1.41421, 0; 0, 1.41421, 0, -1.41421; 1, 1, 1, 1]
dx := sqrt(50) = 7.07107
dy := sqrt(50) = 7.07107
A(DX, DY) := [1, 0, -DX; 0, 1, -DY; 0, 0, 1]
ABCD2 := A(dx, dy)*ABCD1 = [-8.48528, -7.07107, -5.65685, -7.07107; -7.07107, -5.65685, -7.07107, -8.48528; 1, 1, 1, 1]
y := [ABCD2[1, 0]; ABCD2[1, 1]; ABCD2[1, 2]; ABCD2[1, 3]; ABCD2[1, 0]] = [-7.07107; -5.65685; -7.07107; -8.48528; -7.07107]
x := [ABCD2[0, 0]; ABCD2[0, 1]; ABCD2[0, 2]; ABCD2[0, 3]; ABCD2[0, 0]] = [-8.48528; -7.07107; -5.65685; -7.07107; -8.48528]
y1 := [ABCD[1, 0]; ABCD[1, 1]; ABCD[1, 2]; ABCD[1, 3]; ABCD[1, 0]]
x1 := [ABCD[0, 0]; ABCD[0, 1]; ABCD[0, 2]; ABCD[0, 3]; ABCD[0, 0]]
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