ABCD := [1, 0, 0, 0; 0, 0, 1, 0; 0, 0, 0, 2; 1, 1, 1, 1]
r := 1
fi := 45*π/180 = 0.785398
tet := 30*π/180 = 0.523599
T := [
    -sin(fi), cos(fi), 0, 0;
    -cos(tet)*cos(fi), -cos(tet)*sin(fi), sin(tet), 0;
    -sin(tet)*cos(fi), -sin(tet)*sin(fi), -cos(tet), r;
    0, 0, 0, 1
] = [
    -0.707107, 0.707107, 0, 0;
    -0.612372, -0.612372, 0.5, 0;
    -0.353553, -0.353553, -0.866025, 1;
    0, 0, 0, 1
]
ABCD1 := T*ABCD = [
    -0.707107, 0, 0.707107, 0;
    -0.612372, 0, -0.612372, 1;
    0.646447, 1, 0.646447, -0.732051;
    1, 1, 1, 1
]
XL := 100
XH := 800
YL := 200
YH := 900
ABCD2 := transpose(augment(transpose(ABCD1)[:, 0], transpose(ABCD1)[:, 1], transpose(ABCD1)[:, 3])) = [-0.707107, 0, 0.707107, 0; -0.612372, 0, -0.612372, 1; 1, 1, 1, 1]
xL := min(transpose(ABCD2)[:, 0]) = -0.707107
xH := max(transpose(ABCD2)[:, 0]) = 0.707107
yL := min(transpose(ABCD2)[:, 1]) = -0.612372
yH := max(transpose(ABCD2)[:, 1]) = 1
kx := (XH - XL)/(xH - xL) = 494.975
ky := (YH - YL)/(yH - yL) = 434.143
A := [kx, 0, XL - (kx*xL); 0, -ky, YH + (ky*yL); 0, 0, 1]
ABCDRES := A*ABCD2 = [100, 450, 800, 450; 900, 634.143, 900, 200; 1, 1, 1, 1]
D := vectorize(round(ABCDRES)) = [100, 450, 800, 450; 900, 634, 900, 200; 1, 1, 1, 1]
[xa, xb, xc, xd; ya, yb, yc, yd; q, q, q, q] := D
X := transpose([xa, xb, xc, xa, xd, xb, xd, xc]) = [100; 450; 800; 100; 450; 450; 450; 800]
Y := transpose([ya, yb, yc, ya, yd, yb, yd, yc]) = [900; 634; 900; 900; 200; 634; 200; 900]
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xyz := [r*sin(tet)*cos(fi); r*sin(tet)*sin(fi); r*cos(tet)] = [0.353553; 0.353553; 0.866025]
ABCD1 := T*ABCD = [
    -0.707107, 0, 0.707107, 0;
    -0.612372, 0, -0.612372, 1;
    0.646447, 1, 0.646447, -0.732051;
    1, 1, 1, 1
]
A := [ABCD[0, 0]; ABCD[1, 0]; ABCD[2, 0]]
B := [ABCD[0, 1]; ABCD[1, 1]; ABCD[2, 1]]
C := [ABCD[0, 2]; ABCD[1, 2]; ABCD[2, 2]]
D := [ABCD[0, 3]; ABCD[1, 3]; ABCD[2, 3]]
AB := B - A = [-1; 0; 0]
AC := C - A = [-1; 1; 0]
AD := D - A = [-1; 0; 2]
BD := D - B = [0; 0; 2]
BC := C - B = [0; 1; 0]
vecOs := AB×AC = [0; 0; -1]
vecADC := AC×AD = [2; 2; 1]
vecADB := AB×AD = [0; 2; 0]
vecBDC := BC×BD = [2; 0; 0]
v := if(vecOs*xyz ≥ 0, "ABC видна", "ABC не видна") = "ABC не видна"
v1 := if(vecADC*xyz ≥ 0, "ADC видна", "ADC не видна") = "ADC видна"
v2 := if(vecADB*xyz ≥ 0, "ADB видна", "ADB не видна") = "ADB видна"
v3 := if(vecBDC*xyz ≥ 0, "BDC видна", "BDC не видна") = "BDC видна"
