X := [200; 800]
z := [1; 1; 1]
x := [5; 10; 13]
y := [2; 12; 8]
Y := [300; 700]
x_min := min(x) = 5
DY := Y[1, 0] - Y[0, 0] = 400
x_max := max(x) = 13
y_min := min(y) = 2
DX := X[1, 0] - X[0, 0] = 600
y_max := max(y) = 12
dx := x_max - x_min = 8
dy := y_max - y_min = 10
xy := transpose(augment(x, y, z)) = [5, 10, 13; 2, 12, 8; 1, 1, 1]
kx := DX/dx = 75
ky := DY/dy = 40
T := [kx, 0, X[0, 0] - (kx*x_min); 0, -ky, Y[(1, 0)] + (ky*y_min); 0, 0, 1] = [75, 0, -175; 0, -40, 780; 0, 0, 1]
xy1 := T*xy = [200, 575, 800; 700, 300, 460; 1, 1, 1]
x1 := [xy1[0, 0]; xy1[0, 1]; xy1[0, 2]; xy1[0, 0]]
y1 := [xy1[1, 0]; xy1[1, 1]; xy1[1, 2]; xy1[1, 0]]
x2 := [xy[0, 0]; xy[0, 1]; xy[0, 2]; xy[0, 0]]
y2 := [xy[1, 0]; xy[1, 1]; xy[1, 2]; xy[1, 0]]
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