ABCD := [5, 0, 0, 0; 0, 0, 5, 0; 0, 0, 0, 10; 1, 1, 1, 1]
r := 10
XL := 100
fi := 20
XH := 800
tet := 45
YL := 200
fi_rad := fi*π/180 = 0.349066
YH := 900
tet_rad := tet*π/180 = 0.785398
T := [
    -sin(fi_rad), cos(fi_rad), 0, 0;
    -cos(tet_rad)*cos(fi_rad), -cos(tet_rad)*sin(fi_rad), sin(tet_rad), 0;
    -sin(tet_rad)*cos(fi_rad), -sin(tet_rad)*sin(fi_rad), -cos(tet_rad), r;
    0, 0, 0, 1
] = [
    -0.34202, 0.939693, 0, 0;
    -0.664463, -0.241845, 0.707107, 0;
    -0.664463, -0.241845, -0.707107, 10;
    0, 0, 0, 1
]
ABCD1 := T*ABCD = [-1.7101, 0, 4.69846, 0; -3.32232, 0, -1.20922, 7.07107; 6.67768, 10, 8.79078, 2.92893; 1, 1, 1, 1]
ABCD2 := transpose(augment(transpose(ABCD1)[:, 0], transpose(ABCD1)[:, 1], transpose(ABCD1)[:, 3])) = [-1.7101, 0, 4.69846, 0; -3.32232, 0, -1.20922, 7.07107; 1, 1, 1, 1]
xL := min(transpose(ABCD2)[:, 0]) = -1.7101
xH := max(transpose(ABCD2)[:, 0]) = 4.69846
yL := min(transpose(ABCD2)[:, 1]) = -3.32232
yH := max(transpose(ABCD2)[:, 1]) = 7.07107
kx := (XH - XL)/(xH - xL) = 109.229
ky := (YH - YL)/(yH - yL) = 67.3505
A := [kx, 0, XL - (kx*xL); 0, -ky, YH + (ky*yL); 0, 0, 1] = [109.229, 0, 286.792; 0, -67.3505, 676.24; 0, 0, 1]
ABCDRES := A*ABCD2 = [100, 286.792, 800, 286.792; 900, 676.24, 757.682, 200; 1, 1, 1, 1]
D := vectorize(round(ABCDRES)) = [100, 287, 800, 287; 900, 676, 758, 200; 1, 1, 1, 1]
[xa, xb, xc, xd; ya, yb, yc, yd; q, q, q, q] := D
X := transpose([xa, xb, xc, xa, xd, xb, xd, xc]) = [100; 287; 800; 100; 287; 287; 287; 800]
Y := transpose([ya, yb, yc, ya, yd, yb, yd, yc]) = [900; 676; 758; 900; 200; 676; 200; 758]
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