A := [-2; 1]
B := [15; 5]
C := [-3; 7]
D := [5; 1]
Given
A[0, 0] + (B[0, 0] - A[0, 0])*t - C[0, 0] - (D[0, 0] - C[0, 0])*s == 0
A[1, 0] + (B[1, 0] - A[1, 0])*t - C[1, 0] - (D[1, 0] - C[1, 0])*s == 0
Find(t, s) → [21/67; 53/67]
AB := A + (B - A)*21/67 = [3.32836; 2.25373]
CD := C + (D - C)*53/67 = [3.32836; 2.25373]
x := [-2; 15]
y := [1; 5]
x1 := [-3; 5]
y1 := [7; 1]
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