A := [1; 2]
B := [10; 8]
C := [5; 7]
D := [8; 2]
Given
(B[0, 0] - A[0, 0])*t - (D[0, 0] - C[0, 0])*t1 + A[0, 0] - C[0, 0] == 0
(B[1, 0] - A[1, 0])*t - (D[1, 0] - C[1, 0])*t1 + A[1, 0] - C[1, 0] == 0
Find(t, t1) → [5/9; 1/3]
x1 := [5; 8]
x := [1; 10]
y1 := [7; 2]
y := [2; 8]
AB := A + (B - A)*5/9 = [6; 5.33333]
CD := C + (D - C)*1/3 = [6; 5.33333]
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